// SBML level 2 version 1

model CellCycle()

  // Compartments:
  compartment Document = 1;

  // Species:
  species PYT in Document = 0;
  species PYTP in Document = 0;
  species MPF in Document = 0;
  species Cyclin in Document = 0;
  species YT in Document = 0;
  species Cdc25P in Document = 1;
  species Wee1 in Document = 0;
  species APC_ in Document = 0;
  species Cdc25 in Document = 0;
  species Wee1P in Document = 1;
  species IEP in Document = 0;
  species IE in Document = 1;
  species APC in Document = 1;
  species $Cdc2 in Document;
  species $AA in Document;

  // Parameters:
  trans1_k3 = 0.5;
  trans2_k1 = 0.01;
  trans3_V25p = 0.017;
  trans3_V25pp = 0.17;
  trans4_Vweepp = 1;
  trans4_Vweep = 0.01;
  trans5_kcak = 0.64;
  trans6_kpp = 0.004;
  trans7_V25p = 0.017;
  trans7_V25pp = 0.17;
  trans8_Vweepp = 1;
  trans8_Vweep = 0.01;
  trans9_kcak = 0.64;
  trans10_kpp = 0.004;
  trans12_V2p = 0.005;
  trans12_V2pp = 0.25;
  trans13_kf = 0.1;
  trans13_Kf = 1;
  trans15_ka = 2;
  trans15_Ka = 0.1;
  trans16_kb = 0.1;
  trans16_Kb = 1;
  trans17_kg = 2;
  trans17_Kg = 0.01;
  trans18_kh = 0.15;
  trans18_Kh = 0.01;
  trans19_kd = 0.13;
  trans19_Kd = 1;
  trans20_kc = 0.13;
  trans20_Kc = 0.01;
  trans21_V2p = 0.005;
  trans21_V2pp = 0.25;
  trans22_V2p = 0.005;
  trans22_V2pp = 0.25;
  trans11_V2p = 0.005;
  trans11_V2pp = 0.25;
  trans14_V2p = 0.005;
  trans14_V2pp = 0.25;
  trans23_ke = 2;
  trans23_Ke = 0.1;

  // Assignment rules:
  Cdc2 := 1;
  AA := 1;

  // Reactions:
  trans1: Cyclin + $Cdc2 -> YT; trans1_k3*Cyclin*Document;
  trans2: $AA -> Cyclin; trans2_k1*Document;
  trans3: PYT -> YT; (trans3_V25p + Cdc25P*(trans3_V25pp - trans3_V25p))*PYT*Document;  // modifiers: Cdc25P
  trans4: YT -> PYT; (trans4_Vweepp + (1 - Wee1)*(trans4_Vweep - trans4_Vweepp))*YT*Document;  // modifiers: Wee1
  trans5: PYT -> PYTP; trans5_kcak*PYT*Document;
  trans6: PYTP -> PYT; trans6_kpp*PYTP*Document;
  trans7: PYTP -> MPF; (trans7_V25p + Cdc25P*(trans7_V25pp - trans7_V25p))*PYTP*Document;  // modifiers: Cdc25P
  trans8: MPF -> PYTP; (trans8_Vweepp + (1 - Wee1)*(trans8_Vweep - trans8_Vweepp))*MPF*Document;  // modifiers: Wee1
  trans9: YT -> MPF; trans9_kcak*YT*Document;
  trans10: MPF -> YT; trans10_kpp*MPF*Document;
  trans12: Cyclin -> ; (trans12_V2p + APC_*(trans12_V2pp - trans12_V2p))*Cyclin*Document;  // modifiers: APC_
  trans13: Wee1P -> Wee1; trans13_kf*Wee1P/(trans13_Kf + Wee1P)*Document;
  trans15: Cdc25 -> Cdc25P; trans15_ka*MPF*Cdc25/(trans15_Ka + Cdc25)*Document;  // modifiers: MPF
  trans16: Cdc25P -> Cdc25; trans16_kb*Cdc25P/(trans16_Kb + Cdc25P)*Document;
  trans17: IE -> IEP; trans17_kg*MPF*IE/(trans17_Kg + IE)*Document;  // modifiers: MPF
  trans18: IEP -> IE; trans18_kh*IEP/(trans18_Kh + IEP)*Document;
  trans19: APC_ -> APC; trans19_kd*APC_/(trans19_Kd + APC_)*Document;
  trans20: APC -> APC_; trans20_kc*IEP*APC/(trans20_Kc + APC)*Document;  // modifiers: IEP
  trans21: MPF -> ; (trans21_V2p + APC_*(trans21_V2pp - trans21_V2p))*MPF*Document;  // modifiers: APC_
  trans22: YT -> ; (trans22_V2p + APC_*(trans22_V2pp - trans22_V2p))*YT*Document;  // modifiers: APC_
  trans11: PYT -> ; (trans11_V2p + APC_*(trans11_V2pp - trans11_V2p))*PYT*Document;  // modifiers: APC_
  trans14: PYTP -> ; (trans14_V2p + APC_*(trans14_V2pp - trans14_V2p))*PYTP*Document;  // modifiers: APC_
  trans23: Wee1 -> Wee1P; trans23_ke*MPF*Wee1/(trans23_Ke + Wee1)*Document;  // modifiers: MPF
end
