// SBML level 2 version 4

model Cobelli_s_Glucose_Insulin_System()
  // Cobelli's Glucose-Insulin System

  // Compartments:
  compartment Glucose_appearance = 1 MWBUILTINUNIT_liter;
  compartment Insulin_secretion = 1 MWBUILTINUNIT_liter;

  // Species:
  substanceOnly species Dose in Glucose_appearance = 0;  // substance in gram
  substanceOnly species Stomach_Glu_Solid in Glucose_appearance = 0;  // substance in MWBUILTINPREFIX_milli_MWBUILTINUNIT_gram
  substanceOnly species Stomach_Glu_Tritur in Glucose_appearance = 0;  // substance in MWBUILTINPREFIX_milli_MWBUILTINUNIT_gram
  substanceOnly species Stomach_Glu in Glucose_appearance;  // substance in MWBUILTINPREFIX_milli_MWBUILTINUNIT_gram
  substanceOnly species Gut_Glu in Glucose_appearance = 0;  // substance in MWBUILTINPREFIX_milli_MWBUILTINUNIT_gram
  substanceOnly species Plasma_Glu in Glucose_appearance = Basal_Plasma_Glu_Conc*Plasma_Volume_Glu;  // substance in MWBUILTINPREFIX_milli_MWBUILTINUNIT_gram
  species Plasma_Glu_Conc in Glucose_appearance = Basal_Plasma_Glu_Conc;  // substance in MWBUILTINPREFIX_milli_MWBUILTINUNIT_gram
  substanceOnly species Tissue_Glu in Glucose_appearance = (Ins_Ind_Glu_Util - Basal_Glu_Prod + k1*Plasma_Glu)/k2;  // substance in MWBUILTINPREFIX_milli_MWBUILTINUNIT_gram
  species Interstitial_Ins in Insulin_secretion = 0;  // substance in MWBUILTINPREFIX_pico_MWBUILTINUNIT_mole
  substanceOnly species Portal_Ins in Insulin_secretion = Basal_Ins_Secr/gamma;  // substance in MWBUILTINPREFIX_pico_MWBUILTINUNIT_mole
  substanceOnly species Liver_Ins in Insulin_secretion = (Basal_Ins_Secr - m4*Plasma_Ins)/(Hepatic_Extraction*m1/(1 - Hepatic_Extraction));  // substance in MWBUILTINPREFIX_pico_MWBUILTINUNIT_mole
  substanceOnly species Plasma_Ins in Insulin_secretion = 2/5*Basal_Ins_Secr/m4*(1 - Hepatic_Extraction);  // substance in MWBUILTINPREFIX_pico_MWBUILTINUNIT_mole
  species Plasma_Ins_Conc in Insulin_secretion;  // substance in MWBUILTINPREFIX_pico_MWBUILTINUNIT_mole
  species Ins_Delay_1 in Insulin_secretion = Basal_Plasma_Ins_Conc;  // substance in MWBUILTINPREFIX_pico_MWBUILTINUNIT_mole
  species Ins_Delay_2 in Insulin_secretion = Basal_Plasma_Ins_Conc;  // substance in MWBUILTINPREFIX_pico_MWBUILTINUNIT_mole

  // Parameters:
  timeSmall = 1 MWBUILTINPREFIX_pico_MWBUILTINUNIT_second;
  timeEveningMeal = 20 MWBUILTINUNIT_hour;
  timeLunch = 12 MWBUILTINUNIT_hour;
  Stomach_Glu_After_Dosing = 78 gram;
  a = 5/(2*Stomach_Glu_After_Dosing*(1 - b)); a has MWDERIVEDUNIT_1__milligram;
  b = 0.82 dimensionless;
  c = 5/(2*Stomach_Glu_After_Dosing*d); c has MWDERIVEDUNIT_1__milligram;
  d = 0.01 dimensionless;
  kempt has MWDERIVEDUNIT_1__minute;
  kmin = 0.008 MWDERIVEDUNIT_1__minute;
  kmax = 0.0558 MWDERIVEDUNIT_1__minute;
  kgri = kmax; kgri has MWDERIVEDUNIT_1__minute;
  kabs = 0.0568 MWDERIVEDUNIT_1__minute;
  // Glucose rate of appearance
  Glu_Appear_Rate has MWDERIVEDUNIT_milligram__minute;
  f = 0.9 dimensionless;
  basis = 1 kilogram;
  Body_Weight = 78 kilogram;
  k1 = 0.065 MWDERIVEDUNIT_1__minute;
  k2 = 0.079 MWDERIVEDUNIT_1__minute;
  Glu_Prod has MWDERIVEDUNIT_milligram__minute;
  Basal_Plasma_Glu_Conc = 91.76 MWDERIVEDUNIT_milligram__deciliter;
  Plasma_Glu_Conc_Rate has MWDERIVEDUNIT_milligram__deciliter__minute;
  Plasma_Volume_Glu = 1.88 MWBUILTINPREFIX_deci_MWBUILTINUNIT_liter; Plasma_Volume_Glu is "Plasma Volume (Glu)";
  // Insulin-independent utilization by CNS
  Ins_Ind_Glu_Util = 1 MWDERIVEDUNIT_milligram__minute;
  Ins_Dep_Glu_Util has MWDERIVEDUNIT_milligram__minute;
  // Insulin-independent utilization by CNS
  Glu_Util has MWDERIVEDUNIT_milligram__minute;
  // Renal excretion rate of glucose
  Glu_Excretion has MWDERIVEDUNIT_milligram__minute;
  Glu_Excretion_Mode = Plasma_Glu > ke2; Glu_Excretion_Mode has dimensionless;
  ke1 = 0.0005 MWDERIVEDUNIT_1__minute;
  ke2 = 339 MWBUILTINPREFIX_milli_MWBUILTINUNIT_gram;
  Vm has MWDERIVEDUNIT_milligram__minute;
  Vm0 = 2.5129 MWDERIVEDUNIT_milligram__minute;
  Vmx = 0.047 MWDERIVEDUNIT_milligram__minute__picomole__liter;
  Km = 225.59 MWBUILTINPREFIX_milli_MWBUILTINUNIT_gram;
  alpha = 0.05 MWDERIVEDUNIT_1__minute;
  beta = 0.11 MWDERIVEDUNIT_picomole__minute__milligram__deciliter;
  // Delayed glucose signal for insulin secretion
  Delayed_Glu_Signal = 0 MWDERIVEDUNIT_picomole__minute;
  Delayed_Glu_Signal_Mode = beta*(Plasma_Glu_Conc - Basal_Plasma_Glu_Conc) >= -Basal_Ins_Secr; Delayed_Glu_Signal_Mode has dimensionless;
  K = 2.28 MWDERIVEDUNIT_picomole__milligram__deciliter;
  Ins_Prod has MWDERIVEDUNIT_picomole__minute;
  Ins_Prod_Mode = (Plasma_Glu_Conc_Rate > 0*Plasma_Glu_Conc_Rate) && (Plasma_Glu_Conc > Basal_Plasma_Glu_Conc); Ins_Prod_Mode has dimensionless;
  Ins_Secr has MWDERIVEDUNIT_picomole__minute;
  Basal_Ins_Secr = (m6 - Hepatic_Extraction)/m5; Basal_Ins_Secr has MWDERIVEDUNIT_picomole__minute;
  Basal_Plasma_Ins_Conc = 25.49 MWDERIVEDUNIT_picomole__liter;
  m1 = 0.19 MWDERIVEDUNIT_1__minute;
  m2 = 0.484 MWDERIVEDUNIT_1__minute;
  m3 has MWDERIVEDUNIT_1__minute;
  m4 = 0.1936 MWDERIVEDUNIT_1__minute;
  m5 = 0.0304 MWDERIVEDUNIT_minute__picomole;
  m6 = 0.6469 dimensionless;
  Hepatic_Extraction has dimensionless;
  Plasma_Volume_Ins = 0.05 MWBUILTINUNIT_liter; Plasma_Volume_Ins is "Plasma Volume (Ins)";
  ki = 0.0079 MWDERIVEDUNIT_1__minute;
  p2U = 0.0331 MWDERIVEDUNIT_1__minute;
  gamma = 0.5 MWDERIVEDUNIT_1__minute;
  Basal_Glu_Prod = kp1 - kp2*Plasma_Glu - kp3*Ins_Delay_2 - kp4*Portal_Ins; Basal_Glu_Prod has MWDERIVEDUNIT_milligram__minute;
  kp1 = 2.7 MWDERIVEDUNIT_milligram__minute;
  kp2 = 0.0021 MWDERIVEDUNIT_1__minute;
  kp3 = 0.009 MWDERIVEDUNIT_milligram__minute__picomole__liter;
  kp4 = 0.0618 MWDERIVEDUNIT_milligram__minute__picomole;

  // Assignment rules:
  Stomach_Glu := Stomach_Glu_Solid + Stomach_Glu_Tritur;
  Glu_Prod := kp1 - kp2*Plasma_Glu - kp3*Ins_Delay_2 - kp4*Portal_Ins;
  kempt := kmin + 0.5*(kmax - kmin)*(tanh(a*(Stomach_Glu - b*Stomach_Glu_After_Dosing)) - tanh(c*(Stomach_Glu - d*Stomach_Glu_After_Dosing)) + 2);
  Glu_Appear_Rate := f*kabs*Gut_Glu*(basis/Body_Weight);
  Vm := Vm0 + Vmx*Interstitial_Ins;
  Ins_Dep_Glu_Util := Vm*Tissue_Glu/(Km + Tissue_Glu);
  Glu_Excretion := (Glu_Excretion_Mode == 1)*ke1*(Plasma_Glu - ke2);
  Plasma_Glu_Conc_Rate := (Glu_Prod + Glu_Appear_Rate - Ins_Ind_Glu_Util - Glu_Excretion - k1*Plasma_Glu + k2*Tissue_Glu)/Plasma_Volume_Glu;
  Ins_Prod := Delayed_Glu_Signal + Basal_Ins_Secr + (Ins_Prod_Mode == 1)*K*Plasma_Glu_Conc_Rate;
  Ins_Secr := gamma*Portal_Ins;
  Hepatic_Extraction := -m5*Ins_Secr + m6;
  m3 := Hepatic_Extraction*m1/(1 - Hepatic_Extraction);
  Plasma_Ins_Conc := Plasma_Ins/Plasma_Volume_Ins;
  Glu_Util := Ins_Ind_Glu_Util + Ins_Dep_Glu_Util;

  // Rate rules:
  Delayed_Glu_Signal' = -alpha*(Delayed_Glu_Signal + (Delayed_Glu_Signal_Mode == 0)*Basal_Ins_Secr - (Delayed_Glu_Signal_Mode == 1)*beta*(Plasma_Glu_Conc - Basal_Plasma_Glu_Conc));
  Plasma_Glu_Conc' = Plasma_Glu_Conc_Rate;

  // Reactions:
  Grinding: Stomach_Glu_Solid => Stomach_Glu_Tritur; kgri*Stomach_Glu_Solid;
  Emptying: Stomach_Glu_Tritur => Gut_Glu; kempt*Stomach_Glu_Tritur;
  Intestinal_absorption: Gut_Glu => ; kabs*Gut_Glu;
  Appearance: => Plasma_Glu; Glu_Appear_Rate;
  Plasma_tissue_glucose_transport: Plasma_Glu -> Tissue_Glu; k1*Plasma_Glu - k2*Tissue_Glu; Plasma_tissue_glucose_transport is "Plasma-tissue glucose transport";
  Endogenous: => Plasma_Glu; Glu_Prod;
  Insulin_dep_util: Tissue_Glu => ; Ins_Dep_Glu_Util; Insulin_dep_util is "Insulin-dep. util.";
  Insulin_indep_util: Plasma_Glu => ; Ins_Ind_Glu_Util; Insulin_indep_util is "Insulin-indep. util.";
  Renal_excretion: Plasma_Glu => ; Glu_Excretion;
  Production: => Portal_Ins; Ins_Prod;
  Secretion: Portal_Ins => Liver_Ins; Ins_Secr;
  Transport: Liver_Ins -> Plasma_Ins; m1*Liver_Ins - m2*Plasma_Ins;
  Liver_degradation: Liver_Ins => ; m3*Liver_Ins;
  Plasma_degradation: Plasma_Ins => ; m4*Plasma_Ins;
  Ins_delay_1: Plasma_Ins_Conc => Ins_Delay_1 + Plasma_Ins_Conc; ki*Plasma_Ins_Conc;
  Interstitial_transport: Plasma_Ins_Conc => Interstitial_Ins + Plasma_Ins_Conc; p2U*(Plasma_Ins_Conc - Basal_Plasma_Ins_Conc);
  Interstitial_degradation: Interstitial_Ins => ; p2U*Interstitial_Ins;
  Ins_delay_2: Ins_Delay_1 => Ins_Delay_2; ki*Ins_Delay_1;
  Ins_delay_degradation: Ins_Delay_2 => ; ki*Ins_Delay_2;

  // Events:
  Apply_dose: at ((time > timeSmall) && (Dose > 0*Dose)): Stomach_Glu_After_Dosing = Dose + Stomach_Glu, Stomach_Glu_Solid = Stomach_Glu_Solid + Dose, Dose = 0*Dose, a = 5/(2*Stomach_Glu_After_Dosing*(1 - b)), c = 5/(2*Stomach_Glu_After_Dosing*d);
  Insulin_secretion_activation: at ((Plasma_Glu_Conc_Rate > 0*Plasma_Glu_Conc_Rate) && (Plasma_Glu_Conc > Basal_Plasma_Glu_Conc)): Ins_Prod_Mode = 1;
  Insulin_secretion_deactivation: at ((Plasma_Glu_Conc_Rate <= 0*Plasma_Glu_Conc_Rate) || (Plasma_Glu_Conc < Basal_Plasma_Glu_Conc)): Ins_Prod_Mode = 0;
  Glucose_insulin_signal_activation: at (beta*(Plasma_Glu_Conc - Basal_Plasma_Glu_Conc) >= -Basal_Ins_Secr): Delayed_Glu_Signal_Mode = 1; Glucose_insulin_signal_activation is "Glucose-insulin signal activation";
  Glucose_insulin_signal_deactivation: at (beta*(Plasma_Glu_Conc - Basal_Plasma_Glu_Conc) < -Basal_Ins_Secr): Delayed_Glu_Signal_Mode = 0; Glucose_insulin_signal_deactivation is "Glucose-insulin signal deactivation";
  Renal_excretion_activation: at (Plasma_Glu > ke2): Glu_Excretion_Mode = 1;
  Renal_excretion_deactivation: at (Plasma_Glu <= ke2): Glu_Excretion_Mode = 0;
  Reduced_beta_cell_responsivity_after_lunch: at (time >= timeLunch): beta = 0.75*beta;
  Reduced_insulin_sensitivity_after_evening_meal: at (time >= timeEveningMeal): Vmx = 0.75*Vmx;

  // Unit definitions:
  unit MWBUILTINUNIT_liter = metre^3 * 1e-3 dimensionless;
  unit MWBUILTINPREFIX_milli_MWBUILTINUNIT_gram = 1e-3 gram; MWBUILTINPREFIX_milli_MWBUILTINUNIT_gram is "milligram";
  unit MWBUILTINPREFIX_deci_MWBUILTINUNIT_liter = metre^3 * 1e-4 dimensionless; MWBUILTINPREFIX_deci_MWBUILTINUNIT_liter is "deciliter";
  unit MWBUILTINPREFIX_pico_MWBUILTINUNIT_mole = 1e-12 mole; MWBUILTINPREFIX_pico_MWBUILTINUNIT_mole is "picomole";
  unit MWBUILTINPREFIX_pico_MWBUILTINUNIT_second = 1e-12 second; MWBUILTINPREFIX_pico_MWBUILTINUNIT_second is "picosecond";
  unit MWBUILTINUNIT_hour = 3600 second;
  unit MWDERIVEDUNIT_1__milligram = 1000 dimensionless / gram; MWDERIVEDUNIT_1__milligram is "1/milligram";
  unit MWDERIVEDUNIT_1__minute = 0.01666667 dimensionless / second; MWDERIVEDUNIT_1__minute is "1/minute";
  unit MWDERIVEDUNIT_milligram__minute = gram * 1.666667e-5 dimensionless / second; MWDERIVEDUNIT_milligram__minute is "milligram/minute";
  unit MWDERIVEDUNIT_milligram__deciliter = gram * 10 dimensionless / metre^3; MWDERIVEDUNIT_milligram__deciliter is "milligram/deciliter";
  unit MWDERIVEDUNIT_milligram__deciliter__minute = gram * 0.1666667 dimensionless / (metre^3 * second); MWDERIVEDUNIT_milligram__deciliter__minute is "(milligram/deciliter)/minute";
  unit MWDERIVEDUNIT_milligram__minute__picomole__liter = gram * metre^3 * 16666.67 dimensionless / (mole * second); MWDERIVEDUNIT_milligram__minute__picomole__liter is "(milligram/minute)/(picomole/liter)";
  unit MWDERIVEDUNIT_picomole__minute__milligram__deciliter = metre^3 * mole * 1.666667e-15 dimensionless / (gram * second); MWDERIVEDUNIT_picomole__minute__milligram__deciliter is "(picomole/minute)/(milligram/deciliter)";
  unit MWDERIVEDUNIT_picomole__minute = mole * 1.666667e-14 dimensionless / second; MWDERIVEDUNIT_picomole__minute is "picomole/minute";
  unit MWDERIVEDUNIT_picomole__milligram__deciliter = metre^3 * mole * 1e-13 dimensionless / gram; MWDERIVEDUNIT_picomole__milligram__deciliter is "picomole/(milligram/deciliter)";
  unit MWDERIVEDUNIT_picomole__liter = mole * 1e-9 dimensionless / metre^3; MWDERIVEDUNIT_picomole__liter is "picomole/liter";
  unit MWDERIVEDUNIT_minute__picomole = second * 6e13 dimensionless / mole; MWDERIVEDUNIT_minute__picomole is "minute/picomole";
  unit MWDERIVEDUNIT_milligram__minute__picomole = gram * 1.666667e7 dimensionless / (mole * second); MWDERIVEDUNIT_milligram__minute__picomole is "(milligram/minute)/picomole";
end
